# [area: Physical Contants]
q := 1.6*10^-19*C
eV := 1.6*10^-19*J
ε_o := 8.85*10^-12*F/m
# Bandgap:
E_g := 1.12*eV
χ := 4.15*V
t := 3 nm
# Electron Affinity of Silicon:
ε_Si := 11.7*ε_o
ε_SiO2 := 3.9*ε_o
C'_ox := ε_SiO2/t = 0.011505 F/m^2
# Taking Poly:
ϕ_m := 4.15 V
N_A := 10^17*cm^-3
n_i := 1.5*10^10*cm^-3
T := 300 K
k_B := 1.38*10^-23*J*K^-1
ϕ_t := k_B*T/q = 0.025875 V
ϕ_F := 0.56 V - ϕ_t*ln(N_A/n_i) = 0.153436 V
ϕ_f := ϕ_F/ϕ_t = 5.92988
ϕ_s := χ + 0.56 V + ϕ_F = 4.86344 V
v_fb := (ϕ_m - ϕ_s)/ϕ_t = -27.5724
γ_o := sqrt(2*q*ε_Si*N_A)/(C'_ox*sqrt(ϕ_t)) = 0.983587
# [area: Pinch of Potential vs vg]
v_g := -400, -399.9 .. 400
# Modeled Solution: | Error :
# Numerical Solution:
ψ_pNum(i) :=
    for v_g ∈ i
        f(ψ_p) ←
            v_g - v_fb - ψ_p - signum(ψ_p)*γ_o*sqrt(e^(-ψ_p) + ψ_p - 1) if v_g - v_fb > 0
            -ln(((v_g - v_fb - ψ_p)/γ_o)^2 - ψ_p + 1) - ψ_p otherwise
        ψ_pg ← 0
        root(f(ψ_pg), ψ_pg)
ψ_pMod(v_g) :=
    ψ_po ← (v_g - v_fb)/2 - 3*(1 + γ_o/sqrt(2)) + sqrt(((v_g - v_fb)/2 - 3*(1 + γ_o/sqrt(2)))^2 + 6*(v_g - v_fb))
    temp ← -ln(1 - ψ_po + ((v_g - v_fb - ψ_po)/γ_o)^2) if v_g - v_fb < 0
    temp ← 1 - e^(-ψ_po) + (sqrt(v_g - v_fb - 1 + e^(-ψ_po) + (γ_o/2)^2) - γ_o/2)^2 otherwise
    temp
er(i) :=
    for v_g ∈ i
        (ψ_pMod(v_g) - ψ_pNum(v_g))/ψ_pNum(v_g) if ψ_pNum(v_g) ≠ 0
        0 otherwise
ψ_pNum(-400, -399.9 .. 400) = 407.736
ψ_pNum(-255) = -10.7898
ψ_pModS(i) := ln(e^ψ_pMod(i) + 1) - ln(e^(-ψ_pMod(i)) + 1)
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# [area: qi vs vg]
q_o(k) :=
    for x ∈ k
        z ← (x + 100)/20
        e^-100 if x < -110
        otherwise
            e^x if x > -90
            e^(-100 + 20*(5/64 + z/2 + z^2*(15/16 - z^2*(1.25 - z^2)))) otherwise
v_g := 0, 0.1 .. 400
Hi(ψ_p, v_ch, q_o) :=
    n_qo ← 1 + γ_o/(2*sqrt(ψ_p))
    f(q_o) ← 2*q_o + ln(2*q_o*n_qo/γ_o*(2*q_o*n_qo/γ_o + 2*sqrt(ψ_p))) - ψ_p + 2*ϕ_f + v_ch
    f'(q_o) ← 2 + 1/q_o + (n_qo/γ_o - 1/sqrt(ψ_p))/(n_qo*q_o/γ_o + sqrt(ψ_p))
    q_1 ← q_o - f(q_o)/f'(q_o)
    f(q_1) ← 2*q_1 + ln(2*q_1*n_qo/γ_o*(2*q_1*n_qo/γ_o + 2*sqrt(ψ_p))) - (ψ_p - 2*ϕ_f - v_ch)
    f' ← 2 + 1/q_1 + (n_qo/γ_o - 1/sqrt(ψ_p))/(n_qo*q_1/γ_o + sqrt(ψ_p))
    f'' ← -1/q_1^2 - 1/(ψ_p^(3/2)*(n_qo*q_1/γ_o + sqrt(ψ_p))) - ((n_qo/γ_o - 1/sqrt(ψ_p))/(n_qo*q_1/γ_o + sqrt(ψ_p)))^2
    q_i_m ← q_1 - f(q_1)/f'*(1 + f(q_1)*f''/(2*f'^2))
n_q(i) :=
    for v_g ∈ i
        1 + γ_o/(2*sqrt(ψ_pNum(v_g)))
# f' and f`` were tried
# to be calculated using derivative
# function avaliable in toolbar
# but that lead to non-convergence
# in vg [40,80]
# hence theyre defined explicitly
q_i(v_g, v_ch) :=
    g(q_i) ← ln(q_i) + ln(2*n_q(v_g)/γ_o*(q_i*2*n_q(v_g)/γ_o + 2*sqrt(ψ_pNum(v_g) - 2*q_i))) + 2*q_i - ψ_pNum(v_g) + 2*ϕ_f + v_ch
    q_ig ← 0.301
    root(g(q_ig), q_ig)
q_t := 0.301
1 + ln(q_t) = -0.200645
q_i_sd(v_g, v_ch) :=
    ψ_p ← ψ_pModS(v_g)
    n_qo ← 1 + γ_o/(2*sqrt(ψ_p))
    v ← ψ_p - 2*ϕ_f - v_ch - ln(4*n_qo/γ_o*sqrt(ψ_p))
    x ← (v + (1 + ln(q_t)) - sqrt((v + 1 + ln(q_t))^2 - 4*v*(1 + ln(q_t)) + 8*q_t))/2
    q_o ← q_o(x)
    q_i_m ← q_o*(1 + ψ_p - 2*ϕ_f - v_ch - ln(q_o) - ln(2*n_qo/γ_o*(2*q_o*n_qo/γ_o + 2*sqrt(ψ_p)))) if x ≤ -80
    Hi(ψ_p, v_ch, q_o) otherwise
q_i(0, 0) = 3.20156
ln(q_i(42, 0)) = 3.04973
# Error :
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err(v_g, v_ch) := (q_i_sd(v_g, v_ch) - q_i(v_g, v_ch))/q_i(v_g, v_ch)
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# [area: Qb and Qi vs Vg]
v_ds := 0, 0.1 .. 400
q_i(v_g, v_ch) := q_i_sd(v_g, v_ch)
q_I(v_g, v_ds) :=
    ψ_p ← ψ_pModS(v_g)
    n_q ← 1 + γ_o/(2*sqrt(ψ_p))
    q_s ← q_i(v_g, 0)
    q_d ← q_i(v_g, v_ds)
    q_I ← n_q*(q_s + q_d + 1/3*(q_s - q_d)^2/(1 + q_s + q_d))
q_B(v_g, v_ds) :=
    ψ_p ← ψ_pModS(v_g)
    n_q ← 1 + γ_o/(2*sqrt(ψ_p))
    q_s ← q_i(v_g, 0)
    q_d ← q_i(v_g, v_ds)
    q_B ← v_g - v_fb - ψ_p - (n_q - 1)*(q_s + q_d + 1/3*(q_s - q_d)^2/(1 + q_s + q_d))
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# [area: Ids]
v_g := 0, 0.1 .. 400
μ := 1400*cm^2/(V*s)
I_ds(v_g, v_ds) :=
    ψ_p ← ψ_pModS(v_g)
    n_q ← 1 + γ_o/(2*sqrt(ψ_p))
    q_s ← q_i(v_g, 0)
    q_d ← q_i(v_g, v_ds)
    i_ds ← (q_s^2 + q_s) - (q_d^2 + q_d)
    I_ds ← 2*n_q*C'_ox*i_ds*ϕ_t^2*μ
# Assume V.ds = 3V
v_ds := 8 V/ϕ_t
v_gsat := v_fb + v_ds + γ_o*sqrt(e^(-v_ds) + v_ds - 1)
v_gsat = 298.873
# For Saturation region Vg = [0,Vgsat] and for linear region Vg = [Vgsat,Vdd]
I_ds(30, v_ds) = 0.000605516 A
# Linear Region
v_g := v_gsat, v_gsat + 1 .. 400
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# Saturation Region
v_g := 0, 0.1 .. v_gsat
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# Ids VS Vds
v_ds := 0, 0.1 .. 400
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